OpenVSP model (file version 5), 4 components.
Geometry view with OpenVSP parameter names; values to 6 digits, angles in degrees, lengths in the model's unit.
Overall bounding box: X_Min=0 X_Len=46.6106 Y_Min=-19.3775 Y_Len=38.7549 Z_Min=-2.29735 Z_Len=13.1273

Fuselage "Fuselage"
  location (X Y Z) 0 0 0, rotation 0 0 0
  bounding box size 41.8336 5.62326 7.2093
  Design: Length=41.8336
  cross sections:
    n   XLocPercent  YLocPercent  ZLocPercent  shape
    0   0            0            0            point
    1   0.044537     0            0            ellipse Ellipse_Height=2.12223 Ellipse_Width=2.14244
    2   0.0955509    0            0.00277778   ellipse Ellipse_Height=2.96512 Ellipse_Width=3.56744
    3   0.147383     0            0.00486111   ellipse Ellipse_Height=3.66279 Ellipse_Width=4.77674
    4   0.206005     0            0.0215278    ellipse Ellipse_Height=5.46512 Ellipse_Width=5.3814
    5   0.242986     0            0.0326389    ellipse Ellipse_Height=6.11412 Ellipse_Width=5.3814
    6   0.279967     0            0.0402778    ellipse Ellipse_Height=6.39535 Ellipse_Width=5.56279
    7   0.357292     0            0.0416667    ellipse Ellipse_Height=6.33721 Ellipse_Width=5.56279
    8   0.452431     0            0.0326389    ellipse Ellipse_Height=7.05165 Ellipse_Width=5.62326
    9   0.625        0            0.03125      ellipse Ellipse_Height=7.2093 Ellipse_Width=5.62326
    10  0.6875       0            0.0340278    ellipse Ellipse_Height=6.80233 Ellipse_Width=5.0186
    11  0.75         0            0.0430556    ellipse Ellipse_Height=5.98837 Ellipse_Width=4.07468
    12  0.797917     0            0.0493056    ellipse Ellipse_Height=5.1828 Ellipse_Width=2.86501
    13  0.845833     0            0.0576389    ellipse Ellipse_Height=4.06977 Ellipse_Width=1.45116
    14  0.884375     0            0.0625       ellipse Ellipse_Height=3.43023 Ellipse_Width=0.85218
    15  0.922917     0            0.0666667    ellipse Ellipse_Height=2.67442 Ellipse_Width=0.706654
    16  0.961458     0            0.0729167    ellipse Ellipse_Height=1.94538 Ellipse_Width=0.706654
    17  0.980729     0            0.0770833    ellipse Ellipse_Height=1.47377 Ellipse_Width=0.706654
    18  1            0            0.0895833    ellipse Ellipse_Height=0.139535 Ellipse_Width=0

Wing "MainWing", child of "Fuselage"
  location (X Y Z) 19.8387 0 -1.30563, rotation 0 0 0
  symmetric about XZ
  bounding box size 7.32886 38.7549 0.909971
  totals: TotalSpan=38.5 TotalProjectedSpan=38.5 TotalChord=4.96511 TotalArea=191.157 TotalAR=7.75412 MAC=5.34021
  root: chord 7.32886, twist 0, NACA 4-series Camber=0 CamberLoc=0.2 ThickChord=0.124111
  sections:
    n  Span   Root_Chord  Tip_Chord  Area     Sweep    Sweep_Location  Dihedral  Twist  Twist_Location  tip airfoil
    1  19.25  7.32886     2.60135    95.5783  9.13613  0               0         0      0.25            NACA 4-series Camber=0 CamberLoc=0.2 ThickChord=0.1

Wing "HorizontalTail", child of "MainWing"
  location (X Y Z) 41.3973 0 8.85385, rotation 0 0 0
  symmetric about XZ
  bounding box size 5.17209 14.1272 0.631155
  totals: TotalSpan=14.1272 TotalProjectedSpan=14.1272 TotalChord=3.28078 TotalArea=46.3481 TotalAR=4.30604 MAC=3.45303
  root: chord 4.58284, twist 0, NACA 4-series Camber=0 CamberLoc=0.2 ThickChord=0.137681
  sections:
    n  Span     Root_Chord  Tip_Chord  Area     Sweep    Sweep_Location  Dihedral  Twist  Twist_Location  tip airfoil
    1  7.06358  4.58284     1.97872    23.1741  24.3272  0               0         0      0.25            NACA 4-series Camber=0 CamberLoc=0.2 ThickChord=0.1

Wing "VerticalTail", child of "MainWing"
  location (X Y Z) 25.77 0.107527 4.46607, rotation 90 0 -3.81544
  bounding box size 20.8406 0.824617 7.38482
  totals: TotalSpan=7.39562 TotalProjectedSpan=7.39562 TotalChord=9.2401 TotalArea=61.3437 TotalAR=0.891619 MAC=9.1978
  root: chord 15.3425, twist 0, NACA 4-series Camber=0 CamberLoc=0.2 ThickChord=0.00517984
  sections:
    n  Span     Root_Chord  Tip_Chord  Area     Sweep    Sweep_Location  Dihedral  Twist  Twist_Location  tip airfoil
    1  2.32772  15.3425     8.24138    27.4484  75.2725  0               0         0      0.25            NACA 4-series Camber=0 CamberLoc=0.2 ThickChord=0.1
    2  5.0679   8.24138     5.13509    33.8953  49.3634  0.160305        0         0      0.25            as above

VSPAERO settings (reference component "MainWing"): Sref=191.157 bref=38.5 cref=4.96511 Xcg=0 Ycg=0 Zcg=0 AlphaStart=3 AlphaEnd=10 AlphaNpts=1 BetaStart=0 BetaEnd=0 BetaNpts=1 MachStart=0.7 MachEnd=0 MachNpts=1 ReCref=1e+07 Vinf=100 Rho=0.002377
