OpenVSP model (file version 5), 4 components.
Geometry view with OpenVSP parameter names; values to 6 digits, angles in degrees, lengths in the model's unit.
Overall bounding box: X_Min=-0.239687 X_Len=27.3268 Y_Min=-16.5261 Y_Len=33.0522 Z_Min=-2.54235 Z_Len=8.46527

Fuselage "Fuselage"
  location (X Y Z) 0 0 0, rotation 0 0 0
  bounding box size 25.3957 4.20276 5.77977
  Design: Length=25.156
  cross sections:
    n   XLocPercent  YLocPercent  ZLocPercent  shape
    0   0            0            -0.02035     point
    1   0.0894026    0            -0.02035     ellipse Ellipse_Height=3.23415 Ellipse_Width=3.58593
    2   0.148059     0            -0.0174419   ellipse Ellipse_Height=3.78 Ellipse_Width=3.90048
    3   0.229906     0            -0.0116279   ellipse Ellipse_Height=4.4 Ellipse_Width=4.11759
    4   0.247449     0            -0.0065      ellipse Ellipse_Height=4.68 Ellipse_Width=4.13624
    5   0.264992     0            0            ellipse Ellipse_Height=5.06 Ellipse_Width=4.15
    6   0.300078     0            0.0116279    ellipse Ellipse_Height=5.63058 Ellipse_Width=4.17699
    7   0.382686     0            0.015        ellipse Ellipse_Height=5.72017 Ellipse_Width=4.12883
    8   0.441343     0            0.013        ellipse Ellipse_Height=5.48928 Ellipse_Width=3.79066
    9   0.5          0            0.00581395   ellipse Ellipse_Height=4.91298 Ellipse_Width=3.36065
    10  0.572674     0            -0.00581395  ellipse Ellipse_Height=3.7828 Ellipse_Width=3.00601
    11  0.625        0            -0.00581395  ellipse Ellipse_Height=3.49453 Ellipse_Width=2.76869
    12  0.75         0            0            ellipse Ellipse_Height=2.84625 Ellipse_Width=2.1643
    13  0.875        0            0.00581395   ellipse Ellipse_Height=2.19322 Ellipse_Width=1.32986
    14  0.9375       0            0.00872093   ellipse Ellipse_Height=1.80438 Ellipse_Width=0.831164
    15  1            0            0.005        point

Wing "MainWing", child of "Fuselage"
  location (X Y Z) 5.981 0 -2.1, rotation 0 0 0
  symmetric about XZ
  bounding box size 7.54841 33.0522 2.84442
  totals: TotalSpan=32.4 TotalProjectedSpan=32.1228 TotalChord=5.6875 TotalArea=184.275 TotalAR=5.59965 MAC=5.88971
  root: chord 7.55, twist 2, NACA 4-series Camber=0.044 CamberLoc=0.402 ThickChord=0.15
  sections:
    n  Span  Root_Chord  Tip_Chord  Area     Sweep    Sweep_Location  Dihedral  Twist  Twist_Location  tip airfoil
    1  16.2  7.55        3.825      92.1375  2.91829  0               7.5       -1     0.25            NACA 4-series Camber=0.06 CamberLoc=0.396 ThickChord=0.1

Wing "HorizontalTail", child of "Fuselage"
  location (X Y Z) 21.734 0 0.833333, rotation 0 0 0
  symmetric about XZ
  bounding box size 3.99466 13.4869 0.504995
  totals: TotalSpan=13.172 TotalProjectedSpan=13.172 TotalChord=3.32913 TotalArea=43.8514 TotalAR=3.95658 MAC=3.3742
  root: chord 4, twist -3, NACA 4-series Camber=0 CamberLoc=0.2 ThickChord=0.12
  sections:
    n  Span   Root_Chord  Tip_Chord  Area     Sweep  Sweep_Location  Dihedral  Twist  Twist_Location  tip airfoil
    1  6.586  4           2.65827    21.9257  6      0               0         -3     0.25            as above

Wing "VerticalTail", child of "Fuselage"
  location (X Y Z) 21.7512 -0.1 -0.459729, rotation 90 3 8
  bounding box size 5.33619 0.680517 6.38265
  totals: TotalSpan=5.64063 TotalProjectedSpan=5.64063 TotalChord=3.64323 TotalArea=20.5501 TotalAR=1.54825 MAC=3.92426
  root: chord 5.39583, twist 0, NACA 4-series Camber=0 CamberLoc=0.2 ThickChord=0.12
  sections:
    n  Span     Root_Chord  Tip_Chord  Area     Sweep  Sweep_Location  Dihedral  Twist  Twist_Location  tip airfoil
    1  5.64063  5.39583     1.89062    20.5501  30     0               0         0      0.25            NACA 4-series Camber=0 CamberLoc=0.2 ThickChord=0.132

VSPAERO settings (reference component "MainWing"): Sref=184.275 bref=32.4 cref=5.6875 Xcg=7.7 Ycg=0 Zcg=0 AlphaStart=3 AlphaEnd=10 AlphaNpts=1 BetaStart=0 BetaEnd=0 BetaNpts=1 MachStart=0.7 MachEnd=0 MachNpts=1 ReCref=1e+07 Vinf=100 Rho=0.002377
