OpenVSP model (file version 5), 4 components.
Geometry view with OpenVSP parameter names; values to 6 digits, angles in degrees, lengths in the model's unit.
Overall bounding box: X_Min=0 X_Len=28.9994 Y_Min=-20.4408 Y_Len=40.8816 Z_Min=-2.1787 Z_Len=10.7939

Fuselage "Fuselage"
  location (X Y Z) 0 0 0, rotation 0 0 0
  bounding box size 28 3.61541 4.52592
  Design: Length=28
  cross sections:
    n  XLocPercent  YLocPercent  YRotate  ZLocPercent  shape
    0  0            0            0        0            point
    1  0.0625       0            14       -0.0181818   ellipse Ellipse_Height=2.5 Ellipse_Width=3.1
    2  0.125        0            12       -0.00472727  ellipse Ellipse_Height=4 Ellipse_Width=3.5
    3  0.25         0            0        0            ellipse Ellipse_Height=4.25 Ellipse_Width=3.5
    4  0.428571     0            0        0            as above
    5  0.5625       0            0        0            as above
    6  0.75         0            -19      0.0357143    ellipse Ellipse_Height=2.5 Ellipse_Width=3.3
    7  1            0            0        0.0803571    point

Wing "VerticalTail"
  location (X Y Z) 17.1311 0 1.73607, rotation 0 -2.04918 0
  bounding box size 9.23219 0.560362 6.87917
  totals: TotalSpan=6.4 TotalProjectedSpan=1e-06 TotalChord=6.02135 TotalArea=31.5949 TotalAR=0 MAC=5.6045
  root: chord 9.2381, twist 0, NACA 4-series Camber=0 CamberLoc=0.2 ThickChord=0.06
  sections:
    n  Span  Root_Chord  Tip_Chord  Area     Sweep    Sweep_Location  Dihedral  Twist  Twist_Location  tip airfoil
    1  1.2   9.2381      7          9.74286  60.1437  0               90        0      0.25            NACA 4-series Camber=0 CamberLoc=0.2 ThickChord=0.08
    2  0.8   7           5.17       4.868    65       0               90        0      0.25            NACA 4-series Camber=0 CamberLoc=0.2 ThickChord=0.09
    3  4.4   5.17        2.55       16.984   25       0               90        0      0.25            NACA 4-series Camber=0 CamberLoc=0.2 ThickChord=0.1

Wing "MainWing"
  location (X Y Z) 11.5 0 1.5, rotation 0 0 0
  symmetric about XZ
  bounding box size 5.74663 40.8816 1.10211
  totals: TotalSpan=40.4 TotalProjectedSpan=40.3862 TotalChord=4.9375 TotalArea=184.886 TotalAR=8.82187 MAC=4.83106 RelativeTwistFlag=1
  root: chord 5.75, twist 2, NACA 4-series Camber=0 CamberLoc=0.2 ThickChord=0.15
  sections:
    n  Span     Root_Chord  Tip_Chord  Area     Sweep  Sweep_Location  Dihedral  Twist  Twist_Location  tip airfoil
    1  5.61111  5.75        5.75       32.2639  0      0               1.5       0      0.25            NACA 4-series Camber=0 CamberLoc=0.2 ThickChord=0.125
    2  14.5889  5.75        2.5        60.1792  2      0               1.5       0      0.25            NACA 4-series Camber=0 CamberLoc=0.2 ThickChord=0.1

Wing "HorizontalTail"
  location (X Y Z) 24 0 1.8, rotation 0 0 0
  symmetric about XZ
  bounding box size 4.9993 14.3438 0.50442
  totals: TotalSpan=14 TotalProjectedSpan=14 TotalChord=3.6875 TotalArea=51.625 TotalAR=3.79661 MAC=3.84322 RelativeTwistFlag=1
  root: chord 5, twist -1, NACA 4-series Camber=0 CamberLoc=0.2 ThickChord=0.1
  sections:
    n  Span  Root_Chord  Tip_Chord  Area     Sweep  Sweep_Location  Dihedral  Twist  Twist_Location  tip airfoil
    1  7     5           2.375      25.8125  17     0               0         0      0.25            as above

VSPAERO settings (reference component "MainWing"): Sref=184.886 bref=40.4 cref=4.9375 Xcg=0 Ycg=0 Zcg=0 AlphaStart=3 AlphaEnd=10 AlphaNpts=1 BetaStart=0 BetaEnd=0 BetaNpts=1 MachStart=0.7 MachEnd=0 MachNpts=1 ReCref=1e+07 Vinf=100 Rho=0.002377
