OpenVSP model (file version 5), 3 components.
Geometry view with OpenVSP parameter names; values to 6 digits, angles in degrees, lengths in the model's unit.
Overall bounding box: X_Min=0 X_Len=20.0417 Y_Min=-11.0445 Y_Len=22.089 Z_Min=-1.91477 Z_Len=5.45

Fuselage "Fuselage"
  location (X Y Z) 0 0 0, rotation 0 0 0
  bounding box size 20.0417 3.25 5.45
  mass: Density=0.2 Shell_Flag=0 Mass_Area=0.3 Mass_Prior=0
  Design: Length=20
  cross sections:
    n   XLocPercent  YLocPercent  ZLocPercent  shape
    0   0            0            0            point
    1   0.0307836    0            0            ellipse Ellipse_Height=1.25 Ellipse_Width=1.25
    2   0.125        0            0            ellipse Ellipse_Height=2.969 Ellipse_Width=2.5
    3   0.1875       0            0            ellipse Ellipse_Height=3.281 Ellipse_Width=2.75
    4   0.25         0            0.0191898    ellipse Ellipse_Height=3.97898 Ellipse_Width=3
    5   0.34375      0            0.0383795    ellipse Ellipse_Height=5.313 Ellipse_Width=3.25
    6   0.375        0            0.0405117    ellipse Ellipse_Height=5.45 Ellipse_Width=3.25
    7   0.46875      0            0.0405117    ellipse Ellipse_Height=5.35 Ellipse_Width=3.25
    8   0.625        0            0.0170576    ellipse Ellipse_Height=2.93092 Ellipse_Width=2
    9   0.71875      0            0.0298507    ellipse Ellipse_Height=2.04291 Ellipse_Width=1.25
    10  0.75         0            0.0341151    ellipse Ellipse_Height=1.71039 Ellipse_Width=1
    11  0.875        0            0.0554371    ellipse Ellipse_Height=0.938 Ellipse_Width=0.5
    12  1            0            0.0788915    ellipse Ellipse_Height=0.25 Ellipse_Width=0.25
    13  1            0            0.0788915    point

Wing "MainWing", child of "Fuselage"
  location (X Y Z) 3.58696 0 -0.652174, rotation 0 0 0
  symmetric about XZ
  bounding box size 7.48946 22.089 0.72939
  mass: Density=0.7 Shell_Flag=0 Mass_Area=1 Mass_Prior=0
  totals: TotalSpan=22 TotalProjectedSpan=22 TotalChord=3.40909 TotalArea=75 TotalAR=6.45333 MAC=3.9763
  root: chord 5.81818, twist 3, CST airfoil ContLERad=1 LowDegree=7 ThickChord=0.119291 UpDegree=7 Au=[0.170988 0.157287 0.162312 0.143623 0.149218 0.137218 0.140721 0.141105] Al=[-0.170988 -0.157287 -0.162312 -0.143623 -0.149218 -0.137218 -0.140721 -0.141105]
  sections:
    n  Span  Root_Chord  Tip_Chord  Area  Sweep    Sweep_Location  Dihedral  Twist  Twist_Location  tip airfoil
    1  11    5.81818     1          37.5  30.5455  0               0         0      0.25            NACA 4-series Camber=0 CamberLoc=0.2 ThickChord=0.1

Wing "HorizontalTail", child of "MainWing"
  location (X Y Z) 15.7609 0 1.63043, rotation 0 0 0
  symmetric about XZ
  bounding box size 3.47853 12.0737 0.378751
  mass: Density=0.7 Shell_Flag=0 Mass_Area=1 Mass_Prior=0
  totals: TotalSpan=12 TotalProjectedSpan=12 TotalChord=1.98347 TotalArea=23.8017 TotalAR=6.05 MAC=2.22149
  root: chord 3.17355, twist 0, NACA 4-series Camber=0 CamberLoc=0.2 DeltaX=0.245455 ThickChord=0.119291
  sections:
    n  Span  Root_Chord  Tip_Chord  Area     Sweep  Sweep_Location  Dihedral  Twist  Twist_Location  tip airfoil
    1  6     3.17355     0.793388   11.9008  30     0               0         0      0.25            NACA 4-series Camber=0 CamberLoc=0.2 ThickChord=0.1

VSPAERO settings (reference component "MainWing"): Sref=75 bref=22 cref=3.40909 Xcg=0 Ycg=0 Zcg=0 AlphaStart=3 AlphaEnd=10 AlphaNpts=1 BetaStart=0 BetaEnd=0 BetaNpts=1 MachStart=0.7 MachEnd=0 MachNpts=1 ReCref=1e+07 Vinf=100 Rho=0.002377
