OpenVSP model (file version 5), 3 components.
Geometry view with OpenVSP parameter names; values to 6 digits, angles in degrees, lengths in the model's unit.
Overall bounding box: X_Min=0 X_Len=59.8193 Y_Min=-31.8201 Y_Len=63.6402 Z_Min=-7.46681 Z_Len=12.5921

Wing "MainWing"
  location (X Y Z) 25 2.03346 -5.97101, rotation 0 0 0
  symmetric about XZ
  bounding box size 23.9273 63.6402 3.84197
  totals: TotalSpan=60.6833 TotalProjectedSpan=59.536 TotalChord=7.81819 TotalArea=484.682 TotalAR=7.31311 MAC=11.6414
  root: chord 23.9062, twist 0, NACA 63-series A=0.463636 DeltaX=-0.390909 IdealCl=0.581818 ThickChord=0.159091
  sections:
    n  Span     Root_Chord  Tip_Chord  Area     Sweep    Sweep_Location  Dihedral   Twist  Twist_Location  tip airfoil
    1  4.55185  23.9062     12.126     82.0067  10       0               0          0      0.25            NACA 4-series Camber=0.0261818 CamberLoc=0.2 DeltaX=0.0636364 ThickChord=0.1
    2  14.1042  12.126      5.58947    124.931  19.9091  0               4.02174    0      0.25            NACA 4-series Camber=0.0188182 CamberLoc=0.2 DeltaX=-0.154545 ThickChord=0.1
    3  9.38672  5.58947     1.54687    33.4935  10       0               -0.869565  0      0.25            NACA 4-series Camber=0.0118636 CamberLoc=0.2 DeltaX=0.218182 ThickChord=0.1
    4  2.29891  1.54688     0.114583   1.90977  10       0               40         0      0.25            NACA 4-series Camber=0 CamberLoc=0.2 DeltaX=15 ThickChord=0.1

Wing "HorizontalTail"
  location (X Y Z) 52 1.91224 -4.34058, rotation 0 0 -8.47826
  symmetric about XZ
  bounding box size 7.88358 28.4534 9.82332
  totals: TotalSpan=38.4688 TotalProjectedSpan=25.7854 TotalChord=5.07292 TotalArea=201.551 TotalAR=3.29886 MAC=5.50744
  root: chord 7.14583, twist 0, NACA 4-series Camber=0 CamberLoc=0.2 DeltaX=-0.00909091 ThickChord=0.1
  sections:
    n  Span     Root_Chord  Tip_Chord  Area     Sweep    Sweep_Location  Dihedral  Twist  Twist_Location  tip airfoil
    1  11.1615  7.14583     5.07292    68.1895  8.81818  0               7.06522   0      0.25            NACA 4-series Camber=0 CamberLoc=0.2 DeltaX=-0.354545 ThickChord=0.1
    2  8.07292  5.07292     3          32.586   8.81818  0               77        0      0.25            NACA 4-series Camber=0 CamberLoc=0.2 ThickChord=0.1

Fuselage "Fuselage"
  location (X Y Z) 0 0 -5, rotation 0 0 0
  bounding box size 59.7753 7.21921 5.64328
  Design: Length=59.4344
  cross sections:
    n  XLocPercent  YLocPercent  ZLocPercent  shape
    0  0            0            0            point
    1  0.167149     0            0.00492543   ellipse Ellipse_Height=5.5191 Ellipse_Width=6.4188
    2  0.535926     0            0.0104419    ellipse Ellipse_Height=5.11173 Ellipse_Width=7.21921
    3  0.848159     0            0.0104419    ellipse Ellipse_Height=3.80682 Ellipse_Width=5.03293
    4  1            0            0.0104419    ellipse Ellipse_Height=0.5 Ellipse_Width=2.04545
    5  1            0            0.0104419    point

VSPAERO settings (reference component "MainWing"): Sref=484.682 bref=60.6833 cref=7.81819 Xcg=0 Ycg=0 Zcg=0 AlphaStart=3 AlphaEnd=10 AlphaNpts=1 BetaStart=0 BetaEnd=0 BetaNpts=1 MachStart=0.7 MachEnd=0 MachNpts=1 ReCref=1e+07 Vinf=100 Rho=0.002377
