OpenVSP model (file version 5), 4 components.
Geometry view with OpenVSP parameter names; values to 6 digits, angles in degrees, lengths in the model's unit.
Overall bounding box: X_Min=0 X_Len=28.1504 Y_Min=-15.8114 Y_Len=31.6228 Z_Min=3.24654 Z_Len=7.43269

Fuselage "Fuselage"
  location (X Y Z) 0 0 4.249, rotation 0 0 0
  bounding box size 27.4077 4.11406 4.55465
  Design: Length=27.4077
  cross sections:
    n  XLocPercent  YLocPercent  ZLocPercent  shape
    0  0            0            0            point
    1  0.02414      0            -0.00208     ellipse Ellipse_Height=1.29208 Ellipse_Width=1.47425
    2  0.12163      0            0.0165       ellipse Ellipse_Height=2.79252 Ellipse_Width=3.09386
    3  0.2967       0            0.04395      ellipse Ellipse_Height=4.33994 Ellipse_Width=3.94904
    4  0.47956      0            0.04248      ellipse Ellipse_Height=4.21578 Ellipse_Width=3.71004
    5  0.67199      0            0.03643      ellipse Ellipse_Height=2.69202 Ellipse_Width=2.49069
    6  0.92343      0            0.04113      ellipse Ellipse_Height=1.35769 Ellipse_Width=0.87471
    7  1            0            0.04537      point

Wing "HorizontalTail"
  location (X Y Z) 24.6 0 5.399, rotation 0 0 0
  symmetric about XZ
  bounding box size 2.60573 10.3228 0.288578
  totals: TotalSpan=10.3228 TotalProjectedSpan=10.3228 TotalChord=2.60573 TotalArea=26.8984 TotalAR=3.96158 MAC=2.60573
  root: chord 2.60573, twist 0, NACA 4-series Camber=0 CamberLoc=0.2 ThickChord=0.11069
  sections:
    n  Span    Root_Chord  Tip_Chord  Area     Sweep  Sweep_Location  Dihedral  Twist  Twist_Location  tip airfoil
    1  5.1614  2.60573     2.60573    13.4492  0      0               0         0      0.25            NACA 4-series Camber=0 CamberLoc=0.2 ThickChord=0.1

Wing "MainWing"
  location (X Y Z) 10.581 0 7.203, rotation 0 0 0
  symmetric about XZ
  bounding box size 2.48022 31.6228 0.371076
  totals: TotalSpan=31.6228 TotalProjectedSpan=31.6228 TotalChord=2.10819 TotalArea=66.6667 TotalAR=15 MAC=2.12987
  root: chord 2.48022, twist 0, NACA 4-series Camber=0 CamberLoc=0.2 ThickChord=0.14955
  sections:
    n  Span     Root_Chord  Tip_Chord  Area     Sweep  Sweep_Location  Dihedral  Twist  Twist_Location  tip airfoil
    1  15.8114  2.48022     1.73615    33.3333  2      0               0         -2     0.25            NACA 4-series Camber=0 CamberLoc=0.2 ThickChord=0.1

Wing "VerticalTail"
  location (X Y Z) 20.339 0 5.704, rotation 90 0 0
  symmetric about XZ
  bounding box size 7.81135 0.661098 4.97523
  totals: TotalSpan=9.95046 TotalProjectedSpan=9.95046 TotalChord=4.60821 TotalArea=39.9219 TotalAR=2.48013 MAC=4.35329
  root: chord 6.60714, twist 0, NACA 4-series Camber=0 CamberLoc=0.2 ThickChord=0.1
  sections:
    n  Span     Root_Chord  Tip_Chord  Area     Sweep    Sweep_Location  Dihedral  Twist  Twist_Location  tip airfoil
    1  1        6.60714     5.19245    5.8998   58.2643  0               0         0      0.25            as above
    2  0.37427  5.19245     4.59584    1.83173  61.2857  0               0         0      0.25            as above
    3  0.45561  4.59584     4.17649    1.99838  50       0               0         0      0.25            as above
    4  3.14535  4.17649     2.32902    10.2311  40       0               0         0      0.25            as above
