OpenVSP model (file version 5), 3 components.
Geometry view with OpenVSP parameter names; values to 6 digits, angles in degrees, lengths in the model's unit.
Overall bounding box: X_Min=0 X_Len=36.5381 Y_Min=-7.83628 Y_Len=15.6726 Z_Min=-1.26 Z_Len=4.76711

Fuselage "Fuselage"
  location (X Y Z) 0 0 0, rotation 0 0 0
  bounding box size 36 2.52 2.52
  Design: Length=36
  cross sections:
    n   XLocPercent  YLocPercent  ZLocPercent  shape
    0   0            0            -0.0208333   point
    1   0.180126     0            0            ellipse Ellipse_Height=2.4 Ellipse_Width=2.25
    2   0.216667     0            0            ellipse Ellipse_Height=2.4 Ellipse_Width=2.4
    3   0.278789     0            0            as above
    4   0.372849     0            0            ellipse Ellipse_Height=2.52 Ellipse_Width=2.52
    5   0.4375       0            0            as above
    6   0.516984     0            0            ellipse Ellipse_Height=2.22 Ellipse_Width=2.22
    7   0.625        0            0            ellipse Ellipse_Height=1.68 Ellipse_Width=1.68
    8   0.697925     0            0            ellipse Ellipse_Height=1.62 Ellipse_Width=1.62
    9   0.772958     0            0            ellipse Ellipse_Height=1.71 Ellipse_Width=1.71
    10  0.864437     0            0            ellipse Ellipse_Height=1.8 Ellipse_Width=1.8
    11  0.966846     0            0.015        ellipse Ellipse_Height=0.45 Ellipse_Width=0.45
    12  1            0            0.0208583    point

Wing "VerticalTail", child of "Fuselage"
  location (X Y Z) 34.5 0 0.751043, rotation 90 0 0
  bounding box size 4.97023 0.293247 2.75607
  totals: TotalSpan=2.75607 TotalProjectedSpan=2.75607 TotalChord=2.05602 TotalArea=5.66654 TotalAR=1.34049 MAC=2.47582
  root: chord 3.66517, twist 0, NACA 63-series A=1 DeltaX=-0.8 IdealCl=0 ThickChord=0.08
  sections:
    n  Span     Root_Chord  Tip_Chord  Area     Sweep  Sweep_Location  Dihedral  Twist  Twist_Location  tip airfoil
    1  2.75607  3.66517     0.446875   5.66654  30     0               0         0      0.25            NACA 4-series Camber=0 CamberLoc=0.2 ThickChord=0.1

Wing "MainWing"
  location (X Y Z) 14.1 0 -0.15, rotation 0 0 0
  symmetric about XZ
  bounding box size 14.8731 15.6726 0.710367
  totals: TotalSpan=15.6821 TotalProjectedSpan=15.6726 TotalChord=7.48657 TotalArea=117.405 TotalAR=2.09215 MAC=9.91587
  root: chord 14.8731, twist 0, NACA 4-series Camber=0 CamberLoc=0.2 ThickChord=0.04773
  sections:
    n  Span     Root_Chord  Tip_Chord  Area     Sweep  Sweep_Location  Dihedral  Twist  Twist_Location  tip airfoil
    1  7.84106  14.8731     0.1        58.7026  60     0               -2        0      0.25            NACA 4-series Camber=0 CamberLoc=0.2 ThickChord=0.1

VSPAERO settings (reference component "MainWing"): Sref=117.405 bref=15.6821 cref=7.48657 Xcg=61.5214 Ycg=0 Zcg=-0.107073 AlphaStart=3 AlphaEnd=14 AlphaNpts=1 BetaStart=0 BetaEnd=0 BetaNpts=1 MachStart=0.7 MachEnd=1.6 MachNpts=1 ReCref=1e+07 Vinf=100 Rho=0.002377
  control group "Wing_SS_CONT_0": DeflectionAngle=0
  control group "Tail_SS_CONT_0": DeflectionAngle=0
