OpenVSP model (file version 5), 4 components.
Geometry view with OpenVSP parameter names; values to 6 digits, angles in degrees, lengths in the model's unit.
Overall bounding box: X_Min=0 X_Len=35.9663 Y_Min=-22.095 Y_Len=44.1899 Z_Min=-1.3485 Z_Len=10.475

Fuselage "Fuselage"
  location (X Y Z) 0 0 0, rotation 0 0 0
  bounding box size 33.26 5.15783 5.02372
  Design: Length=33.26
  cross sections:
    n  XLocPercent  YLocPercent  ZLocPercent  shape
    0  0            0            0            point
    1  0.121473     0            0.00156043   ellipse Ellipse_Height=2.7099 Ellipse_Width=4.0045
    2  0.259317     0            0.00709862   ellipse Ellipse_Height=3.1652 Ellipse_Width=5.098
    3  0.369038     0            0.0338244    ellipse Ellipse_Height=4.947 Ellipse_Width=5.129
    4  0.526422     0            0.0361064    as above
    5  0.603416     0            0.0351293    ellipse Ellipse_Height=5.01364 Ellipse_Width=5.15783
    6  0.680412     0            0.0367589    ellipse Ellipse_Height=3.924 Ellipse_Width=4.3713
    7  0.988184     0            0.055911     ellipse Ellipse_Height=0.2552 Ellipse_Width=0.6
    8  1            0            0.0569453    point

Wing "MainWing"
  location (X Y Z) 12.1 0 -0.862, rotation 0 0 0
  symmetric about XZ
  bounding box size 6.4987 44.1899 2.38755
  totals: TotalSpan=44.3469 TotalProjectedSpan=44.1899 TotalChord=5.85627 TotalArea=230.808 TotalAR=8.46049 MAC=5.35109 RelativeDihedralFlag=1
  root: chord 5.85643, twist 0, airfoil file "NACA 23018"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 BaseThickChord=0.181283 ThickChord=0.181283
  sections:
    n  Span      Root_Chord  Tip_Chord  Area     Sweep  Sweep_Location  Dihedral  Twist  Twist_Location  tip airfoil
    1  5.12466   5.85643     5.85643    30.0122  0      0               0         0      0.25            airfoil file "NACA 23015"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 BaseThickChord=0.151072 ThickChord=0.151072
    2  1.35621   5.85643     5.85643    7.94256  0      0               5.5       0      0.25            as above
    3  0.503621  5.85643     6.4894     3.10881  0      0               0         0      0.25            as above
    4  1.80294   6.4894      6.4894     11.7     0      0               0         0      0.25            as above
    5  0.503621  6.4894      5.79054    3.09222  3      0               0         0      0.25            as above
    6  12.8824   5.79054     3.45436    59.5483  3      0               0         0      0.25            as above

Wing "HorizontalTail"
  location (X Y Z) 28.7 0 1.812, rotation 0 -1.90476 0
  symmetric about XZ
  bounding box size 4.44264 16.9998 0.458027
  totals: TotalSpan=16.9998 TotalProjectedSpan=16.9998 TotalChord=2.76217 TotalArea=60.2541 TotalAR=4.79624 MAC=3.6382
  root: chord 4.445, twist 0, NACA 4-series Camber=0 CamberLoc=0.2 ThickChord=0.1
  sections:
    n  Span    Root_Chord  Tip_Chord  Area      Sweep  Sweep_Location  Dihedral  Twist  Twist_Location  tip airfoil
    1  7.9439  4.445       2.814      28.8324   7      0               0         0      0.25            as above
    2  0.278   2.814       2.75       0.773396  7      0               0         0      0.25            as above
    3  0.278   2.75        1          0.52125   45     0               0         0      0.25            as above

Wing "VerticalTail"
  location (X Y Z) 18.7 0 3.5, rotation 90 0 -6.5
  bounding box size 17.2663 0.725483 7.26793
  totals: TotalSpan=7.5449 TotalProjectedSpan=7.5449 TotalChord=6.05165 TotalArea=45.5391 TotalAR=1.25004 MAC=7.24571
  root: chord 14.5, twist 0, NACA 4-series Camber=0 CamberLoc=0.2 ThickChord=0.05
  sections:
    n  Span    Root_Chord  Tip_Chord  Area      Sweep    Sweep_Location  Dihedral  Twist  Twist_Location  tip airfoil
    1  0.6942  14.5        10.6391    8.72578   80.2664  0               0         0      0.25            NACA 4-series Camber=0 CamberLoc=0.2 ThickChord=0.06
    2  0.6942  10.6391     7.2003     6.19206   79.1584  0               0         0      0.25            NACA 4-series Camber=0 CamberLoc=0.2 ThickChord=0.085
    3  1.3884  7.2003      5.9356     9.11894   49.6919  0               0         0      0.25            NACA 4-series Camber=0 CamberLoc=0.2 ThickChord=0.1
    4  3.2465  5.9356      4.2743     16.5732   37.942   0               0         0      0.25            as above
    5  0.6758  4.2743      3.9395     2.77544   37.3596  0               0         0      0.25            as above
    6  0.4229  3.9395      3.1227     1.4933    65.5471  0               0         0      0.25            as above
    7  0.4229  3.1227      0.0001     0.660316  82.547   0               0         0      0.25            as above

VSPAERO settings (reference component "MainWing"): Sref=230.808 bref=44.3469 cref=5.85627 Xcg=0 Ycg=0 Zcg=0 AlphaStart=3 AlphaEnd=10 AlphaNpts=1 BetaStart=0 BetaEnd=0 BetaNpts=1 MachStart=0.7 MachEnd=0 MachNpts=1 ReCref=1e+07 Vinf=100 Rho=0.002377
