OpenVSP model (file version 5), 5 components.
Geometry view with OpenVSP parameter names; values to 6 digits, angles in degrees, lengths in the model's unit.
Overall bounding box: X_Min=0 X_Len=50.3148 Y_Min=-20.0136 Y_Len=40.0271 Z_Min=-4.11009 Z_Len=13.3998

Fuselage "Fuselage"
  location (X Y Z) 0 0 0, rotation 0 0 0
  bounding box size 50.3148 7.25718 7.25718
  Design: Length=50
  cross sections:
    n  XLocPercent  YLocPercent  ZLocPercent  shape
    0  0            0            0            point
    1  0.408385     0            0            ellipse Ellipse_Height=4.18889 Ellipse_Width=3.95833
    2  0.696111     0            0            ellipse Ellipse_Height=4.04444 Ellipse_Width=4.51389
    3  0.95543      0            0            ellipse Ellipse_Height=3 Ellipse_Width=2.5
    4  1            0            0            ellipse Ellipse_Height=1.88889 Ellipse_Width=1.88889
    5  1            0            0            point

Wing "HorizontalTail"
  location (X Y Z) 18 0 0, rotation 0 0 0
  symmetric about XZ
  bounding box size 28.9729 40.0271 1.28887
  totals: TotalSpan=39.8107 TotalProjectedSpan=39.8107 TotalChord=15.0796 TotalArea=600.33 TotalAR=2.64003 MAC=18.0121
  root: chord 28.9729, twist 0, NACA 4-series Camber=0 CamberLoc=0.2 ThickChord=0.034515
  sections:
    n  Span     Root_Chord  Tip_Chord  Area     Sweep  Sweep_Location  Dihedral  Twist  Twist_Location  tip airfoil
    1  19.9053  28.9729     1.18636    300.165  30     0               0         0      0.25            NACA 4-series Camber=0 CamberLoc=0.2 DeltaX=10.5 ThickChord=0.168582

Wing "MainWing", child of "HorizontalTail"
  location (X Y Z) 6.58031 1.70984 0, rotation 0 0 0
  symmetric about XZ
  bounding box size 11.7258 21.4197 0.596386
  totals: TotalSpan=18 TotalProjectedSpan=18 TotalChord=3.4802 TotalArea=62.6436 TotalAR=5.17212 MAC=4.06938
  root: chord 5.9604, twist 0, NACA 4-series Camber=0 CamberLoc=0.2 ThickChord=0.1
  sections:
    n  Span  Root_Chord  Tip_Chord  Area     Sweep  Sweep_Location  Dihedral  Twist  Twist_Location  tip airfoil
    1  9     5.9604      1          31.3218  50     0               0         0      0.25            as above

Wing "VerticalTail1"
  location (X Y Z) 40.7772 0 1.19171, rotation 90 0 0
  bounding box size 7.61608 0.742024 8.09804
  totals: TotalSpan=8.09804 TotalProjectedSpan=8.09804 TotalChord=5.17822 TotalArea=41.9334 TotalAR=1.56387 MAC=5.50053
  root: chord 7.41584, twist 0, NACA 4-series Camber=0.00350649 CamberLoc=0.2 ThickChord=0.1
  sections:
    n  Span     Root_Chord  Tip_Chord  Area     Sweep  Sweep_Location  Dihedral  Twist  Twist_Location  tip airfoil
    1  8.09804  7.41584     2.94059    41.9334  30     0               0         0      0.25            NACA 4-series Camber=0 CamberLoc=0.2 ThickChord=0.1

Wing "VerticalTail2", child of "VerticalTail1"
  location (X Y Z) 43.6269 0 -1.03627, rotation -90 0 0
  bounding box size 7 0.700406 3.07382
  totals: TotalSpan=3.07382 TotalProjectedSpan=3.07382 TotalChord=4 TotalArea=12.2953 TotalAR=0.768455 MAC=4.75
  root: chord 7, twist 0, NACA 4-series Camber=0 CamberLoc=0.2 DeltaX=-0.376623 ThickChord=0.1
  sections:
    n  Span     Root_Chord  Tip_Chord  Area     Sweep  Sweep_Location  Dihedral  Twist  Twist_Location  tip airfoil
    1  3.07382  7           1          12.2953  30     0               0         0      0.25            NACA 4-series Camber=0 CamberLoc=0.2 ThickChord=0.1
