OpenVSP model (file version 5), 3 components.
Geometry view with OpenVSP parameter names; values to 6 digits, angles in degrees, lengths in the model's unit.
Overall bounding box: X_Min=0 X_Len=30.4167 Y_Min=-27.0768 Y_Len=54.1536 Z_Min=-3.03718 Z_Len=7.9475

Fuselage "Fuselage"
  location (X Y Z) 0 7 0, rotation 0 0 0
  symmetric about XZ
  bounding box size 30.4167 18.0916 4.06144
  Design: Length=30
  cross sections:
    n  XLocPercent  YLocPercent  ZLocPercent  shape
    0  0            0            0.0185185    point
    1  0.125        0            0.0462963    ellipse Ellipse_Height=3.7 Ellipse_Width=3.7
    2  0.25         0            0.0416667    ellipse Ellipse_Height=3.1 Ellipse_Width=3.5
    3  0.5          0            0.03         ellipse Ellipse_Height=2 Ellipse_Width=2.5
    4  1            0            0.03         as above
    5  1            0            0.03         point

Wing "HorizontalTail"
  location (X Y Z) 27 0 4.73913, rotation 0 0 0
  symmetric about XZ
  bounding box size 2.99622 16.7159 7.9475
  totals: TotalSpan=28 TotalProjectedSpan=16.6143 TotalChord=2.225 TotalArea=68.7188 TotalAR=4.0169 MAC=2.56494 RelativeTwistFlag=1
  root: chord 3, twist -3, NACA 4-series Camber=0 CamberLoc=0.2 ThickChord=0.1
  sections:
    n  Span  Root_Chord  Tip_Chord  Area      Sweep  Sweep_Location  Dihedral  Twist  Twist_Location  tip airfoil
    1  5.5   3           3          16.5      0      0               0         0      0.25            as above
    2  1     3           2.25       2.625     0      0               -30       0      0.25            as above
    3  3.75  2.25        2.25       8.4375    0      0               -75       0      0.25            as above
    4  3     2.25        1.625      5.8125    15     0               -75       0      0.25            as above
    5  0.75  1.625       1          0.984375  42     0               -75       0      0.25            as above

Wing "MainWing"
  location (X Y Z) 14 0 0.55, rotation 0 0 0
  symmetric about XZ
  bounding box size 4.00036 54.1536 1.361
  totals: TotalSpan=54 TotalProjectedSpan=53.9452 TotalChord=3.4375 TotalArea=171 TotalAR=17.018 MAC=3.34195
  root: chord 4, twist 2, NACA 4-series Camber=0.02 CamberLoc=0.4 ThickChord=0.12
  sections:
    n  Span  Root_Chord  Tip_Chord  Area  Sweep  Sweep_Location  Dihedral  Twist  Twist_Location  tip airfoil
    1  7     4           4          28    0      0               0         0      0.25            as above
    2  20    4           1.75       57.5  2      0               3         0      0.25            as above

VSPAERO settings (reference component "MainWing"): Sref=171 bref=54 cref=3.4375 Xcg=0 Ycg=0 Zcg=0 AlphaStart=2 AlphaEnd=10 AlphaNpts=1 BetaStart=0 BetaEnd=0 BetaNpts=1 MachStart=0.7 MachEnd=0 MachNpts=1 ReCref=1e+07 Vinf=100 Rho=0.002377
