OpenVSP model (file version 5), 3 components.
Geometry view with OpenVSP parameter names; values to 6 digits, angles in degrees, lengths in the model's unit.
Overall bounding box: X_Min=0 X_Len=49.7716 Y_Min=-22.1862 Y_Len=44.3724 Z_Min=-1.74067 Z_Len=3.86993

Fuselage "Fuselage"
  location (X Y Z) 0 0 0, rotation 0 0 0
  bounding box size 49.7716 4.65171 3.86993
  Design: Length=49.3571
  cross sections:
    n  Spin        XLocPercent  YLocPercent  YRotate   ZLocPercent  shape
    0  0           0            0            0         -0.00819672  point
    1  0           0.100005     0            0         0            ellipse Ellipse_Height=3 Ellipse_Width=3.36735
    2  0           0.188878     0            0         0            as above
    3  0           0.333178     0            0         0            as above
    4  0           0.821706     0            0         0            as above
    5  0           0.904277     0            0         0.00819672   as above
    6  -0.02143    1            0            -37.2857  0.0143773    ellipse Ellipse_Height=0.57143 Ellipse_Width=2.08163
    7  -0.0214286  1            0            -37.2857  0.0143772    point
  structure "FuselageGeom_Struct1": Skin

Wing "MainWing", child of "Fuselage"
  location (X Y Z) 19.0164 1.2 -0.655738, rotation 0 0 0
  symmetric about XZ
  bounding box size 18.1948 44.3724 1.3467
  totals: TotalSpan=41.8983 TotalProjectedSpan=41.8215 TotalChord=6.88203 TotalArea=243.011 TotalAR=7.19736 MAC=7.07777
  root: chord 12.5132, twist 0, NACA 4-series Camber=0 CamberLoc=0.2 ThickChord=0.025
  sections:
    n  Span     Root_Chord  Tip_Chord  Area     Sweep    Sweep_Location  Dihedral  Twist  Twist_Location  tip airfoil
    1  6.25742  12.5132     6.62577    59.8804  35.9286  0               0         0      0.25            NACA 4-series Camber=0 CamberLoc=0.2 ThickChord=0.0571429
    2  14.6917  6.62577     1.76333    61.6253  39       0               4.14286   0      0.25            NACA 4-series Camber=0 CamberLoc=0.2 ThickChord=0.1
  structure "WingGeom_Struct1": Skin, RibArray3, Spar5, Spar6, Spar7

Wing "HorizontalTail"
  location (X Y Z) 42.0902 1.3 0.87, rotation 1.9877 0 0
  symmetric about XZ
  bounding box size 5.13539 16.5513 1.40717
  totals: TotalSpan=14.3254 TotalProjectedSpan=13.9192 TotalChord=2.5 TotalArea=35.8135 TotalAR=5.40984 MAC=2.8
  root: chord 4, twist 0, NACA 4-series Camber=0 CamberLoc=0.2 ThickChord=0.1
  sections:
    n  Span     Root_Chord  Tip_Chord  Area     Sweep  Sweep_Location  Dihedral  Twist  Twist_Location  tip airfoil
    1  3.58135  4           2.5        11.6394  30     0               -7.14286  0      0.25            as above
    2  3.58135  2.5         1          6.26736  30     0               18        0      0.25            as above

VSPAERO settings (reference component "MainWing"): Sref=243.011 bref=41.8983 cref=6.88203 Xcg=0 Ycg=0 Zcg=0 AlphaStart=3 AlphaEnd=10 AlphaNpts=1 BetaStart=0 BetaEnd=0 BetaNpts=1 MachStart=0.7 MachEnd=0 MachNpts=1 ReCref=1e+07 Vinf=100 Rho=0.002377
