OpenVSP model (file version 5), 5 components.
Geometry view with OpenVSP parameter names; values to 6 digits, angles in degrees, lengths in the model's unit.
Overall bounding box: X_Min=0 X_Len=23.3 Y_Min=-7.65005 Y_Len=15.3001 Z_Min=-0.65 Z_Len=5.25797

Blank "Su-57"
  location (X Y Z) 0 0 0, rotation 0 0 0

Wing "MainWing", child of "Su-57"
  location (X Y Z) 6.21889 0 0.49, rotation 0 0 0
  symmetric about XZ
  bounding box size 15.0669 15.3001 0.905252
  totals: TotalSpan=15.1979 TotalProjectedSpan=15.1973 TotalChord=9.38367 TotalArea=124.438 TotalAR=1.85599 MAC=10.2346
  root: chord 15.0669, twist 0, NACA 4-series Camber=0 CamberLoc=0.2 ThickChord=0.06
  sections:
    n  Span      Root_Chord  Tip_Chord  Area     Sweep    Sweep_Location  Dihedral  Twist  Twist_Location  tip airfoil
    1  2.36835   15.0669     11.8617    31.8882  49.4429  0               0         0      0.25            as above
    2  0.934877  11.8617     7.63291    9.11251  72.9909  0               0         0      0.25            as above
    3  4.29573   7.63291     2.246      21.2186  50.6758  0               0.710383  0      0.25            as above

Wing "HorizontalTail", child of "MainWing"
  location (X Y Z) 17.545 1.8 0.49, rotation 0 0 0
  symmetric about XZ
  bounding box size 4.68298 9.9103 0.240329
  totals: TotalSpan=6.30209 TotalProjectedSpan=6.30209 TotalChord=2.51389 TotalArea=15.8803 TotalAR=2.50098 MAC=2.90365
  root: chord 4, twist 0, NACA 4-series Camber=0 CamberLoc=0.2 ThickChord=0.06
  sections:
    n  Span      Root_Chord  Tip_Chord  Area      Sweep    Sweep_Location  Dihedral  Twist  Twist_Location  tip airfoil
    1  0.395834  4           3.66667    1.51736   59.8864  0               0         0      0.25            as above
    2  2.125     3.66667     1.8        5.80834   46       0               0         0      0.25            as above
    3  0.630209  1.8         0.15       0.614454  46       0               0         0      0.25            as above

Wing "VerticalTail", child of "MainWing"
  location (X Y Z) 15.492 2 0.59, rotation 90 0 0
  symmetric about XZ
  bounding box size 4.48587 4.25235 4.01797
  totals: TotalSpan=8.025 TotalProjectedSpan=8.025 TotalChord=1.68594 TotalArea=20.3046 TotalAR=3.17172 MAC=2.92462
  root: chord 4.2, twist 0, NACA 4-series Camber=0 CamberLoc=0.2 ThickChord=0.06
  sections:
    n  Span      Root_Chord  Tip_Chord  Area      Sweep  Sweep_Location  Dihedral  Twist  Twist_Location  tip airfoil
    1  3.7       4.2         1.17188    9.93797   41.85  0               0         0      0.25            as above
    2  0.312501  1.17188     0.2        0.214356  41.85  0               0         0      0.25            as above

Fuselage "Fuselage"
  location (X Y Z) 0 0 0, rotation 0 0 0
  bounding box size 23.3 2 2.35751
  Design: Length=23.3
  cross sections:
    n  XLocPercent  YLocPercent  YRotate  ZLocPercent  shape
    0  0            0            0        0            point
    1  0.0343347    0            -5       0.00364807   ellipse Ellipse_Height=0.15 Ellipse_Width=0.15
    2  0.152184     0            0        0.0214592    ellipse Ellipse_Height=1.2 Ellipse_Width=1.2
    3  0.247872     0            2        0.0300429    ellipse Ellipse_Height=1.4 Ellipse_Width=1.4
    4  0.410399     0            5        0.0386266    as above
    5  0.572926     0            0        0.0171674    ellipse Ellipse_Height=1.4 Ellipse_Width=1.6
    6  0.7446       0            0        0            ellipse Ellipse_Height=1.3 Ellipse_Width=2
    7  0.916273     0            -2       0.00429184   ellipse Ellipse_Height=0.7 Ellipse_Width=1.4
    8  0.936325     0            2        0.00643777   ellipse Ellipse_Height=0.6 Ellipse_Width=0.6
    9  1            0            0        0.00429184   point

VSPAERO settings (reference component "MainWing"): Sref=124.438 bref=15.1979 cref=9.38367 Xcg=0 Ycg=0 Zcg=0 AlphaStart=3 AlphaEnd=10 AlphaNpts=1 BetaStart=0 BetaEnd=0 BetaNpts=1 MachStart=0.7 MachEnd=0 MachNpts=1 ReCref=1e+07 Vinf=100 Rho=0.002377
