OpenVSP model (file version 5), 4 components.
Geometry view with OpenVSP parameter names; values to 6 digits, angles in degrees, lengths in the model's unit.
Overall bounding box: X_Min=0 X_Len=7.9134 Y_Min=-5.83146 Y_Len=11.6629 Z_Min=-0.580737 Z_Len=2.26378

Fuselage "Fuselage"
  location (X Y Z) 0 0 0, rotation 0 0 0
  bounding box size 7.08876 1.26847 1.46304
  Design: Length=6.8
  cross sections:
    n   XLocPercent  YLocPercent  ZLocPercent  shape
    0   0            0            0            point
    1   0.0543478    0            0            ellipse Ellipse_Height=0.3048 Ellipse_Width=0.3048
    2   0.0623188    0            0            as above
    3   0.0724638    0            -0.00362319  ellipse Ellipse_Height=0.3556 Ellipse_Width=1.0414
    4   0.151611     0            -0.0144928   ellipse Ellipse_Height=0.8001 Ellipse_Width=1.15824
    5   0.223551     0            -0.0144928   ellipse Ellipse_Height=0.88392 Ellipse_Width=1.2192
    6   0.431522     0            0.0221739    ellipse Ellipse_Height=1.46304 Ellipse_Width=1.2446
    7   0.615942     0            0.0165217    ellipse Ellipse_Height=1.1938 Ellipse_Width=1.016
    8   0.83913      0            0.0195652    ellipse Ellipse_Height=0.73152 Ellipse_Width=0.3048
    9   1            0            0.04059      ellipse Ellipse_Height=0.8 Ellipse_Width=0.09
    10  1            0            0.04059      point

Wing "VerticalTail", child of "Fuselage"
  location (X Y Z) 6.31 0 -0.098552, rotation 90 0 0
  bounding box size 1.6034 0.14785 1.7816
  totals: TotalSpan=1.7624 TotalProjectedSpan=1.7624 TotalChord=0.856087 TotalArea=1.62357 TotalAR=1.9131 MAC=0.969576
  root: chord 1, twist 0, NACA 4-series Camber=0 CamberLoc=0.5 ThickChord=0.1
  sections:
    n  Span    Root_Chord  Tip_Chord  Area       Sweep  Sweep_Location  Dihedral  Twist  Twist_Location  tip airfoil
    1  0.1524  1           1.23153    0.170042   30     0               0         0      0               NACA 4-series Camber=0 CamberLoc=0.5 ThickChord=0.12
    2  1.5     1.23153     0.62999    1.39614    30     0               0         0      0               as above
    3  0.11    0.62999     0.41349    0.0573914  65     0               0         0      0.25            NACA 4-series Camber=0 CamberLoc=0.2 ThickChord=0.1

Wing "MainWing"
  location (X Y Z) 2.3368 0 -0.40894, rotation 0 0 0
  symmetric about XZ
  bounding box size 1.55982 11.6629 0.71636
  totals: TotalSpan=11.7225 TotalProjectedSpan=11.6425 TotalChord=0.920208 TotalArea=13.5438 TotalAR=10.0081 MAC=1.2013 RelativeTwistFlag=1
  root: chord 1.55977, twist 0, airfoil file "NASA/LANGLEY NLF 0414F AIRFOIL"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 BaseThickChord=0.141832 ThickChord=0.141832
  sections:
    n  Span       Root_Chord  Tip_Chord  Area       Sweep    Sweep_Location  Dihedral  Twist  Twist_Location  tip airfoil
    1  3.34245    1.55977     1.09136    4.43064    0        0.25            5.5       -1.5   0.25            as above
    2  2.37244    1.09136     0.79329    2.23562    0        0.25            5.5       -1.5   0.25            as above
    3  0.0925317  0.79329     0.735759   0.0707427  25       0.25            25        -0.5   0.25            airfoil file "NASA/LANGLEY NLF 0414F AIRFOIL"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 BaseThickChord=0.141832 ThickChord=0.08
    4  0.0538472  0.735759    0.561071   0.0349153  74.3479  0               25        -1     0.25            airfoil file "NASA/LANGLEY NLF 0414F AIRFOIL"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 BaseThickChord=0.141832 ThickChord=0.04

Wing "HorizontalTail"
  location (X Y Z) 6.4262 0 0.14732, rotation 0 0 0
  symmetric about XZ
  bounding box size 0.758768 4.00661 0.0910933
  totals: TotalSpan=4 TotalProjectedSpan=4 TotalChord=0.490085 TotalArea=2.39958 TotalAR=6.66785 MAC=0.619519
  root: chord 0.758768, twist 0, NACA 4-series Camber=0 CamberLoc=0.5 ThickChord=0.12
  sections:
    n  Span  Root_Chord  Tip_Chord  Area       Sweep  Sweep_Location  Dihedral  Twist  Twist_Location  tip airfoil
    1  1.84  0.758768    0.482852   1.14229    0      0.625           0         0      0               NACA 4-series Camber=0 CamberLoc=0.5 ThickChord=0.1
    2  0.16  0.482852    0.235869   0.0574977  30     0.625           0         0      0               as above

VSPAERO settings (reference component "MainWing"): Sref=13.5438 bref=11.7225 cref=0.920208 Xcg=0.701 Ycg=1.75976e-07 Zcg=0.035052 AlphaStart=3 AlphaEnd=10 AlphaNpts=1 BetaStart=0 BetaEnd=0 BetaNpts=1 MachStart=0.5 MachEnd=0 MachNpts=1 ReCref=1e+07 Vinf=94 Rho=1.225
  control group "Elevator": DeflectionAngle=0
  control group "Rudder": DeflectionAngle=0
  control group "AileronLeft": DeflectionAngle=0
  control group "AileronRight": DeflectionAngle=0
  control group "Flaps": DeflectionAngle=0
